# Simple script that takes a atom id and velocity components from the command line and
# performs a PKA simulation. Interstitial and vacancy coordinates are also output.

# read some info from command line
variable dump_dir index dump  # place to put dump files
variable end_time index 1.0  # how long (in ps) to run pka simulation for
variable Nx index 10
variable T index 300
# pka info
variable	pka_id index 1
variable	vx index 1.0
variable	vy index 1.0
variable	vz index 1.0

# start from equilibrated structure
read_restart	restart/restart.equilibrate-T-${T}-Nx-${Nx}

# store original atom coords to get coords of vacancies, and interstitials to some extent
fix		cell_coords all store/state 0 x y z

# some stuff does not get stored in restart file
pair_style	eam/fs
pair_coeff	* * Fe_2.eam.fs Fe
reset_timestep	0

# compute voronoi occuptation
compute		defects all voronoi/atom occupation

# count vacs and dump coords
variable	vac_sites atom c_defects[1]==0
group		vac_sites dynamic all var vac_sites
compute		num_vacs all reduce sum v_vac_sites
dump		vac_dump vac_sites custom 100 ${dump_dir}/defects/dump.vacs.*.txt id f_cell_coords[1] f_cell_coords[2] f_cell_coords[3]
dump_modify	vac_dump pad 6

# identify ints and dump coords, not counting them here
variable	int_atoms atom c_defects[2]>1
group		int_atoms dynamic all var int_atoms
dump		int_dump int_atoms custom 100 ${dump_dir}/defects/dump.ints.*.txt id x y z
dump_modify	int_dump pad 6

# cut timestep so no atoms move more than 1/100th of lattice constant in a step
fix		fix_dt all dt/reset 1 NULL 0.001 0.01 units lattice

# perform NVE time integration
fix		fix_nve all nve

# compute kinetic energy to make sure we set velocities correctly
compute		ke all ke/atom
compute		max_ke all reduce max c_ke

# output info
thermo		100
thermo_style	custom step time dt temp press c_max_ke c_num_vacs

# dump all coords every once in a while, just to check
dump		bigdump all custom 1000 ${dump_dir}/all/dump.all.*.txt id x y z c_defects[1] c_defects[2] c_ke
dump_modify	bigdump pad 6

# pka
group		pka id ${pka_id}
velocity	pka set ${vx} ${vy} ${vz} units box  # 587 A/ps is about 1 keV for Fe

# initialize system
run 0 post no

# dump initial coords for reference
write_dump     all custom ${dump_dir}/all/dump.all.begin.txt id type mass x y z

# write some info to file
variable	time equal time  # is there a better way to get the time into the line
fix		output all ave/time 1 5 100 v_time c_thermo_temp c_thermo_press c_num_vacs c_max_ke file ${dump_dir}/time-history.txt

# run until specified time
variable time equal time
print "* running until ${end_time} ps *"

label loop
variable a loop 1000
run 1000 pre no post no
if ${time}>${end_time} then "jump SELF break"
next a
jump SELF loop
label break
print "ALL DONE"

# when done, dump and write restart in case we want to pick things up again
write_dump     all custom ${dump_dir}/all/dump.all.end.txt id type mass x y z
write_restart  ${dump_dir}/restart-file
